*Heading
** Job name: Job-1 Model name: thermal
** Generated by: Abaqus/CAE 2019
*Preprint, echo=NO, model=NO, history=NO, contact=NO
**
** PARTS
**
*Part, name=thermal
*Node
      1, 0.0599999987, 0.0599999987, 0.0211500004
      2,           0., 0.0599999987, 0.0211500004
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*Element, type=DC3D8
 1,   5,  37, 158,  56,   1,  17, 133,  36
 2,  37,  38, 159, 158,  17,  18, 134, 133
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*Nset, nset=addelement
   1,   2,   3,   4,  17,  18
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*Elset, elset=addelement, generate
  1,  36,   1
*Nset, nset=Set-2, generate
   1,  412,    1
*Elset, elset=Set-2, generate
   1,  236,    1
** Section: Section-1
*Solid Section, elset=Set-2, material=Material-1
,
*End Part
**
**
** ASSEMBLY
**
*Assembly, name=Assembly
**
*Instance, name=thermal-1, part=thermal
*End Instance
**
*Nset, nset=Set-1, instance=thermal-1
  13,  14,  15,  16,  97,  98
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*Elset, elset=Set-1, instance=thermal-1, generate
 137,  236,    1
*Elset, elset=Set-2, instance=thermal-1, generate
  1,  36,   1
*Elset, elset=_AM-Model-1__AllBuildParts__, internal, instance=thermal-1, generate
   1,  236,    1
*Elset, elset=addelement, instance=thermal-1, generate
  1,  36,   1
*ELEMENT PROGRESSIVE ACTIVATION,NAME="__AM-Model-1_Material Source -1_EPA__",ELSET=addelement,FOLLOW=No
*End Assembly
**
** MATERIALS
**
*Material, name=Material-1
*Conductivity
120., 3.39
121., 6.79
121., 10.2
122., 13.6
123.,  17.
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300.,1500.
*Density
2823.,
*Elastic
  7.3e+10,  0.3,   0.
  7.3e+10,  0.3, 1.55
  7.3e+10,  0.3, 3.11
  7.3e+10,  0.3, 4.66
  7.3e+10,  0.3, 6.22
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 2.54e+08,  0.3, 597.
*Expansion
 2.24e-05,100.
 2.25e-05,103.
 2.25e-05,104.
 2.25e-05,105.
 2.25e-05,106.
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 2.47e-05,600.
*Latent Heat
374000.,543.,643.
*Plastic
 2.35e+08,       0.,      20.
 2.54e+08,  0.00676,      20.
 1.17e+08,       0.,     316.
 1.38e+08, 0.007759,     316.
  4.1e+07,       0.,     371.
 6.11e+07, 0.009024,     371.
 4.83e+06,       0.,     550.
 8.04e+06,  0.00941,     550.
*Specific Heat
 862.,  50.
 864., 53.5
 865., 56.9
 870., 60.4
 873., 63.8
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1060.,1400.
**
** PHYSICAL CONSTANTS
**
*Physical Constants, absolute zero=-273.15, stefan boltzmann=5.67e-08
**
** BOUNDARY CONDITIONS
**
** Name: substrate Type: Displacement/Rotation
*Boundary
Set-1, 1, 1
Set-1, 2, 2
Set-1, 3, 3
Set-1, 4, 4
Set-1, 5, 5
Set-1, 6, 6
**------------------------------------------------------------
**--------Table Types Defined in the Abaqus AM-Interface------
**------------------------------------------------------------
*PROPERTY TABLE TYPE, NAME = "ABQ_AM.AbsorptionCoeff" , PROPERTIES = 1
"AbsorptionCoeff", Unitless
*PROPERTY TABLE TYPE, NAME = "ABQ_AM.EnclosureAmbientTemp" , PROPERTIES = 1
"VATTemperature",
*PARAMETER TABLE TYPE, NAME = "ABQ_AM.MovingHeatSource" , PARAMETERS = 2
STRING,,"Event Series","Laser Event Series",
STRING,,Concentrated|Uniform|Goldak,"Energy Distribution",
*PARAMETER TABLE TYPE, NAME = "ABQ_AM.MaterialDeposition.Advanced" , PARAMETERS = 3
STRING,Partial,Full|Partial,"Activation Type",
FLOAT,0.0,,"Activation Threshold",
FLOAT,1.0,,"Max Volume fraction",
*PARAMETER TABLE TYPE, NAME = "ABQ_AM.MovingHeatSource.Uniform" , PARAMETERS = 9
INTEGER,,,"SubDivX",
INTEGER,,,"SubDivY",
INTEGER,,,"SubDivZ",
FLOAT,,,"offset1",
FLOAT,,,"offset2",
FLOAT,,,"offset3",
FLOAT,,,"BoxLength1",
FLOAT,,,"BoxLength2",
FLOAT,,,"BoxLength3",
*PARAMETER TABLE TYPE, NAME = "ABQ_AM.MovingHeatSource.Goldak" , PARAMETERS = 10
INTEGER,,,"SubDivX",
INTEGER,,,"SubDivY",
INTEGER,,,"SubDivZ",
FLOAT,,,"a",
FLOAT,,,"b",
FLOAT,,,"cf",
FLOAT,,,"cr",
FLOAT,,,"ff",
FLOAT,,,"fr",
FLOAT,,,"BoxSizeFactor",
*PARAMETER TABLE TYPE, NAME = "ABQ_AM.MovingHeatSource.Advanced" , PARAMETERS = 7
STRING,False,True|False,"Conserve Total Energy",
STRING,False,True|False,"Control increment size",
STRING,Relative,Absolute|Relative,"Offset type",
FLOAT,0.0,,"LaserVectorX",
FLOAT,0.0,,"LaserVectorY",
FLOAT,-1.0,,"LaserVectorZ",
FLOAT,1.0,,"Field factor",
*PARAMETER TABLE TYPE, NAME = "ABQ_AM.MaterialDeposition.Bead" , PARAMETERS = 5
STRING,Z,X|Y|Z,"Stack Direction",
FLOAT,,,"Bead Height",
FLOAT,,,"Bead Width",
FLOAT,,,"Activation Offset",
STRING,,Below|Above,"Deposition Position",
*PARAMETER TABLE TYPE, NAME = "ABQ_AM.MaterialDeposition" , PARAMETERS = 2
STRING,,"Event Series","Material Event Series",
STRING,,Roller|Bead,"Deposition Process",
*Event Series Type, FIELDS = 1, NAME = "ABQ_AM.MaterialDeposition"
"On and off", Unitless
*Event Series Type, FIELDS = 1, NAME = "ABQ_AM.PowerMagnitude"
"Power", ML2T03
**------------------------------------------------------------
**-------Event Series defined in the Abaqus AM-Interface------
**------------------------------------------------------------
*EVENT SERIES, NAME = "material path" , TIME =TOTAL TIME,
	TYPE = "ABQ_AM.MaterialDeposition",
	INPUT = "material_input.txt"
*EVENT SERIES, NAME = "heat pathj" , TIME =TOTAL TIME,
	TYPE = "ABQ_AM.MaterialDeposition",
	INPUT = "C:/temp/Master/One-layer disk/heat_input.txt"
**------------------------------------------------------------
**-----Table Collections defined in the Abaqus AM-Interface---
**------------------------------------------------------------
*TABLE COLLECTION, NAME = ABQ_AM_material
*PARAMETER TABLE, TYPE = "ABQ_AM.MaterialDeposition.Bead"
"Z", 0.00115, 0.02, 0.005, "Below"
*PARAMETER TABLE, TYPE = "ABQ_AM.MaterialDeposition"
"material path", "Bead"
*TABLE COLLECTION, NAME = ABQ_AM_heat
*PROPERTY TABLE, TYPE = "ABQ_AM.AbsorptionCoeff"
**tempDependency = OFF
0.9
*PARAMETER TABLE, TYPE = "ABQ_AM.MovingHeatSource.Advanced"
"False", "False", "Relative", 0.0, 0.0, -1.0, 1.0
*PARAMETER TABLE, TYPE = "ABQ_AM.MovingHeatSource"
"heat pathj", "Goldak"
*PARAMETER TABLE, TYPE = "ABQ_AM.MovingHeatSource.Goldak"
9, 9, 9, 0.005, 0.0023, 0.002, 0.004, 0.6, 1.4, 1
** ----------------------------------------------------------------
**
** STEP: heat
**
*Step, name=heat, nlgeom=NO, inc=100000
*Heat Transfer, end=PERIOD, deltmx=1000., mxdem=1.
0.001, 144., 1e-06, 0.1,
*ACTIVATE ELEMENTS , ACTIVATION = "__AM-Model-1_Material Source -1_EPA__"
ABQ_AM_material
*DFLUX
_AM-Model-1__AllBuildParts__ , MBFNU , 1 , ABQ_AM_heat
*FILM
thermal-1.Set-2 , FFS , 20 , 8.5
*FILM
thermal-1.Set-2 , FFS , 20 , 167
*RADIATE
thermal-1.Set-2 , RFS , 20 , 0.8
*RADIATE
thermal-1.Set-2 , RFS , 20 , 0.8
**
** OUTPUT REQUESTS
**
*Restart, write, frequency=0
**
** FIELD OUTPUT: F-Output-1
**
*Output, field
*Node Output
CFL, NT, RFL, RFLE
*Element Output, directions=YES
FILMCOEF, FLUXS, HBF, HFL, NFLUX, SINKTEMP, TEMP
*Contact Output
HFLA, HTL, HTLA, SJD, SJDA, SJDT, SJDTA, WEIGHT
*Radiation Output
FTEMP, RADFL, RADFLA, RADTL, RADTLA, VFTOT
**
** HISTORY OUTPUT: H-Output-1
**
*Output, history
*Contact Output
HFLA, HTL, HTLA, SJD, SJDA, SJDT, SJDTA, WEIGHT
*Radiation Output
FTEMP, RADFL, RADFLA, RADTL, RADTLA, VFTOT
*OUTPUT,FIELD,FREQ=1
*ELEMENT OUTPUT
EACTIVE
*End Step
** ----------------------------------------------------------------
**
** STEP: cooling
**
*Step, name=cooling, nlgeom=NO, inc=100000
*Heat Transfer, end=PERIOD, deltmx=1000., mxdem=1.
0.001, 5000., 1e-05, 0.1,
**
** OUTPUT REQUESTS
**
*Restart, write, frequency=0
**
** FIELD OUTPUT: F-Output-1
**
*Output, field
*Node Output
NT,
*Element Output, directions=YES
TEMP,
**
** HISTORY OUTPUT: H-Output-1
**
*Output, history
*Contact Output
HFLA, HTL, HTLA, SJD, SJDA, SJDT, SJDTA, WEIGHT
*Radiation Output
FTEMP, RADFL, RADFLA, RADTL, RADTLA, VFTOT
*End Step
